// SBML level 2 version 3

model GPGeneratedModel()

  // Species:
  substanceOnly species ERK in compartment = 0.025;
  substanceOnly species ERKPP in compartment = 0;
  substanceOnly species ERKPP|ERK in compartment = 0;
  substanceOnly species ERKPP|MEKPP in compartment = 0;
  substanceOnly species ERKPP|MEKPP|ERK in compartment = 0;
  substanceOnly species ERKPP|RKIP in compartment = 0;
  substanceOnly species ERKPP|RKIPP in compartment = 0;
  substanceOnly species ERKPP|RP in compartment = 0;
  substanceOnly species ERKPP|RP|RKIPP in compartment = 0;
  substanceOnly species ERKPP|Raf1Star in compartment = 0;
  substanceOnly species ERKPP|Raf1Star|RKIP in compartment = 0;
  substanceOnly species ERKPP|Raf1Star|RKIP|ERKPP in compartment = 0;
  substanceOnly species ERK|ERKPP in compartment = 0;
  substanceOnly species ERK|MEKPP in compartment = 0;
  substanceOnly species ERK|MEKPP|ERK in compartment = 0;
  substanceOnly species ERK|RKIP in compartment = 0;
  substanceOnly species ERK|RKIPP in compartment = 0;
  substanceOnly species ERK|RP in compartment = 0;
  substanceOnly species ERK|RP|RKIPP in compartment = 0;
  substanceOnly species ERK|Raf1Star in compartment = 0;
  substanceOnly species ERK|Raf1Star|RKIP in compartment = 0;
  substanceOnly species ERK|Raf1Star|RKIP|ERKPP in compartment = 0;
  substanceOnly species MEKPP in compartment = 0.025;
  substanceOnly species MEKPP|ERK in compartment = 0;
  substanceOnly species MEKPP|ERKPP in compartment = 0;
  substanceOnly species MEKPP|ERK|ERK in compartment = 0;
  substanceOnly species MEKPP|ERK|ERKPP in compartment = 0;
  substanceOnly species MEKPP|ERK|MEKPP in compartment = 0;
  substanceOnly species MEKPP|ERK|RKIP in compartment = 0;
  substanceOnly species MEKPP|ERK|RKIPP in compartment = 0;
  substanceOnly species MEKPP|ERK|RP in compartment = 0;
  substanceOnly species MEKPP|ERK|RP|RKIPP in compartment = 0;
  substanceOnly species MEKPP|ERK|Raf1Star in compartment = 0;
  substanceOnly species MEKPP|ERK|Raf1Star|RKIP in compartment = 0;
  substanceOnly species MEKPP|ERK|Raf1Star|RKIP|ERKPP in compartment = 0;
  substanceOnly species MEKPP|MEKPP|ERK in compartment = 0;
  substanceOnly species MEKPP|RKIP in compartment = 0;
  substanceOnly species MEKPP|RKIPP in compartment = 0;
  substanceOnly species MEKPP|RP in compartment = 0;
  substanceOnly species MEKPP|RP|RKIPP in compartment = 0;
  substanceOnly species MEKPP|Raf1Star in compartment = 0;
  substanceOnly species MEKPP|Raf1Star|RKIP in compartment = 0;
  substanceOnly species MEKPP|Raf1Star|RKIP|ERKPP in compartment = 0;
  substanceOnly species RKIP in compartment = 0.025;
  substanceOnly species RKIPP in compartment = 0;
  substanceOnly species RKIPP|ERK in compartment = 0;
  substanceOnly species RKIPP|ERKPP in compartment = 0;
  substanceOnly species RKIPP|MEKPP in compartment = 0;
  substanceOnly species RKIPP|MEKPP|ERK in compartment = 0;
  substanceOnly species RKIPP|RKIP in compartment = 0;
  substanceOnly species RKIPP|RP in compartment = 0;
  substanceOnly species RKIPP|RP|RKIPP in compartment = 0;
  substanceOnly species RKIPP|Raf1Star in compartment = 0;
  substanceOnly species RKIPP|Raf1Star|RKIP in compartment = 0;
  substanceOnly species RKIPP|Raf1Star|RKIP|ERKPP in compartment = 0;
  substanceOnly species RKIP|ERK in compartment = 0;
  substanceOnly species RKIP|ERKPP in compartment = 0;
  substanceOnly species RKIP|MEKPP in compartment = 0;
  substanceOnly species RKIP|MEKPP|ERK in compartment = 0;
  substanceOnly species RKIP|RKIPP in compartment = 0;
  substanceOnly species RKIP|RP in compartment = 0;
  substanceOnly species RKIP|RP|RKIPP in compartment = 0;
  substanceOnly species RKIP|Raf1Star in compartment = 0;
  substanceOnly species RKIP|Raf1Star|RKIP in compartment = 0;
  substanceOnly species RKIP|Raf1Star|RKIP|ERKPP in compartment = 0;
  substanceOnly species RP in compartment = 0.03;
  substanceOnly species RP|ERK in compartment = 0;
  substanceOnly species RP|ERKPP in compartment = 0;
  substanceOnly species RP|MEKPP in compartment = 0;
  substanceOnly species RP|MEKPP|ERK in compartment = 0;
  substanceOnly species RP|RKIP in compartment = 0;
  substanceOnly species RP|RKIPP in compartment = 0;
  substanceOnly species RP|RKIPP|ERK in compartment = 0;
  substanceOnly species RP|RKIPP|ERKPP in compartment = 0;
  substanceOnly species RP|RKIPP|MEKPP in compartment = 0;
  substanceOnly species RP|RKIPP|MEKPP|ERK in compartment = 0;
  substanceOnly species RP|RKIPP|RKIP in compartment = 0;
  substanceOnly species RP|RKIPP|RKIPP in compartment = 0;
  substanceOnly species RP|RKIPP|RP in compartment = 0;
  substanceOnly species RP|RKIPP|Raf1Star in compartment = 0;
  substanceOnly species RP|RKIPP|Raf1Star|RKIP in compartment = 0;
  substanceOnly species RP|RKIPP|Raf1Star|RKIP|ERKPP in compartment = 0;
  substanceOnly species RP|RP|RKIPP in compartment = 0;
  substanceOnly species RP|Raf1Star in compartment = 0;
  substanceOnly species RP|Raf1Star|RKIP in compartment = 0;
  substanceOnly species RP|Raf1Star|RKIP|ERKPP in compartment = 0;
  substanceOnly species Raf1Star in compartment = 0.025;
  substanceOnly species Raf1Star|ERK in compartment = 0;
  substanceOnly species Raf1Star|ERKPP in compartment = 0;
  substanceOnly species Raf1Star|MEKPP in compartment = 0;
  substanceOnly species Raf1Star|MEKPP|ERK in compartment = 0;
  substanceOnly species Raf1Star|RKIP in compartment = 0;
  substanceOnly species Raf1Star|RKIPP in compartment = 0;
  substanceOnly species Raf1Star|RKIP|ERK in compartment = 0;
  substanceOnly species Raf1Star|RKIP|ERKPP in compartment = 0;
  substanceOnly species Raf1Star|RKIP|ERKPP|ERK in compartment = 0;
  substanceOnly species Raf1Star|RKIP|ERKPP|ERKPP in compartment = 0;
  substanceOnly species Raf1Star|RKIP|ERKPP|MEKPP in compartment = 0;
  substanceOnly species Raf1Star|RKIP|ERKPP|MEKPP|ERK in compartment = 0;
  substanceOnly species Raf1Star|RKIP|ERKPP|RKIP in compartment = 0;
  substanceOnly species Raf1Star|RKIP|ERKPP|RKIPP in compartment = 0;
  substanceOnly species Raf1Star|RKIP|ERKPP|RP in compartment = 0;
  substanceOnly species Raf1Star|RKIP|ERKPP|RP|RKIPP in compartment = 0;
  substanceOnly species Raf1Star|RKIP|ERKPP|Raf1Star in compartment = 0;
  substanceOnly species Raf1Star|RKIP|ERKPP|Raf1Star|RKIP in compartment = 0;
  substanceOnly species Raf1Star|RKIP|MEKPP in compartment = 0;
  substanceOnly species Raf1Star|RKIP|MEKPP|ERK in compartment = 0;
  substanceOnly species Raf1Star|RKIP|RKIP in compartment = 0;
  substanceOnly species Raf1Star|RKIP|RKIPP in compartment = 0;
  substanceOnly species Raf1Star|RKIP|RP in compartment = 0;
  substanceOnly species Raf1Star|RKIP|RP|RKIPP in compartment = 0;
  substanceOnly species Raf1Star|RKIP|Raf1Star in compartment = 0;
  substanceOnly species Raf1Star|RKIP|Raf1Star|RKIP|ERKPP in compartment = 0;
  substanceOnly species Raf1Star|RP in compartment = 0;
  substanceOnly species Raf1Star|RP|RKIPP in compartment = 0;
  substanceOnly species Raf1Star|Raf1Star|RKIP in compartment = 0;
  substanceOnly species Raf1Star|Raf1Star|RKIP|ERKPP in compartment = 0;

  // Parameters:
  k0 = 0.1864311;
  k1 = 0.1847271;
  k2 = 0.003620826;
  k3 = 0.6158309;
  k4 = 0.2263471;
  k5 = 0.843649;
  k6 = 0.5587255;
  k7 = 0.8561607;
  k8 = 0.03525271;
  k9 = 0.5176381;
  k10 = 0.6354465;
  k11 = 0.376034;
  k12 = 0.7176803;
  k13 = 0.4259257;
  k14 = 0.3632432;
  k15 = 0.5308745;
  k16 = 0.4500648;
  k17 = 0.6708662;
  k18 = 0.07470509;
  k19 = 0.8084856;
  k20 = 0.6721539;
  k21 = 0.8754198;
  k22 = 0.5395042;
  k23 = 0.5146879;
  k24 = 0.1791695;
  k25 = 0.1584846;
  k26 = 0.6403981;
  k27 = 0.8763554;
  k28 = 0.160645;
  k29 = 0.3236465;
  k30 = 0.6058975;
  k31 = 0.1067217;
  k32 = 0.07177426;
  k33 = 0.6031112;
  k34 = 0.951809;
  k35 = 0.880493;
  k36 = 0.8556259;
  k37 = 0.4937691;
  k38 = 0.9514284;
  k39 = 0.2734155;
  k40 = 0.662898;
  k41 = 0.4214446;
  k42 = 0.2954734;
  k43 = 0.6260561;
  k44 = 0.3092134;
  k45 = 0.2928305;
  k46 = 0.7705714;
  k47 = 0.7413248;
  k48 = 0.8179722;
  k49 = 0.02617835;
  k50 = 0.971877;
  k51 = 0.6536989;
  k52 = 0.7270749;
  k53 = 0.3910556;
  k54 = 0.4286144;
  k55 = 0.0604414;
  k56 = 0.2658609;
  k57 = 0.2729906;
  k58 = 0.7945044;
  k59 = 0.3671465;
  k60 = 0.05436849;
  k61 = 0.9132872;
  k62 = 0.9516555;
  k63 = 0.822407;
  k64 = 0.7265923;
  k65 = 0.3834745;
  k66 = 0.3544392;
  k67 = 0.7202568;
  k68 = 0.8255784;
  k69 = 0.3658021;
  k70 = 0.6977908;
  k71 = 0.1138658;
  k72 = 0.2923183;
  k73 = 0.3166735;
  k74 = 0.7202691;
  k75 = 0.1972824;
  k76 = 0.3788061;
  k77 = 0.3569333;
  k78 = 0.9181668;
  k79 = 0.9684723;
  k80 = 0.6592068;
  k81 = 0.345369;
  k82 = 0.4654594;
  k83 = 0.7852493;
  k84 = 0.7885866;
  k85 = 0.111251;
  k86 = 0.6622461;
  k87 = 0.3534354;
  k88 = 0.7835111;
  k89 = 0.4530426;
  k90 = 0.6411862;
  k91 = 0.7561477;
  k92 = 0.3487189;
  k93 = 0.9801379;
  k94 = 0.1607763;
  k95 = 0.5595727;
  k96 = 0.8878254;
  k97 = 0.7868081;
  k98 = 0.8693496;
  k99 = 0.09681383;
  k100 = 0.5087774;
  k101 = 0.6344034;
  k102 = 0.8574606;
  k103 = 0.8555722;
  k104 = 0.4341521;
  k105 = 0.2298958;
  k106 = 0.13331;
  k107 = 0.08294516;
  k108 = 0.8004124;
  k109 = 0.6289123;
  k110 = 0.8473637;
  k111 = 0.9683338;
  k112 = 0.7010843;
  k113 = 0.7940479;
  k114 = 0.7952855;
  k115 = 0.4505495;
  k116 = 0.4741463;
  k117 = 0.6520027;
  k118 = 0.3461896;
  k119 = 0.9982402;
  k120 = 0.3938771;
  k121 = 0.7922094;
  k122 = 0.2050804;
  k123 = 0.293001;
  k124 = 0.9167048;
  k125 = 0.4735089;
  k126 = 0.9474351;
  k127 = 0.9328522;
  k128 = 0.7649864;
  k129 = 0.6378948;
  k130 = 0.6281425;
  k131 = 0.5972413;
  k132 = 0.6957345;
  k133 = 0.7485856;
  k134 = 0.8303834;
  k135 = 0.4765155;
  k136 = 0.8718205;
  k137 = 0.4237649;
  k138 = 0.5869406;
  k139 = 0.0008169116;
  k140 = 0.1910874;
  k141 = 0.02697156;
  k142 = 0.3102936;
  k143 = 0.2319043;
  k144 = 0.6995281;
  k145 = 0.3838976;
  k146 = 0.1046085;
  k147 = 0.2692625;
  k148 = 0.7560366;
  k149 = 0.6965943;
  k150 = 0.8171409;
  k151 = 0.4304536;
  k152 = 0.3816977;
  k153 = 0.6964577;
  k154 = 0.983446;
  k155 = 0.9322943;
  k156 = 0.2166031;
  k157 = 0.8185242;
  k158 = 0.9284078;
  k159 = 0.6958002;
  k160 = 0.9915174;
  k161 = 0.5239818;
  k162 = 0.3625667;
  k163 = 0.1728157;
  k164 = 0.9892264;
  k165 = 0.1450502;
  k166 = 0.3704057;
  k167 = 0.3213378;
  k168 = 0.6291732;
  k169 = 0.9182922;
  k170 = 0.9210765;
  k171 = 0.05840273;
  k172 = 0.1445859;
  k173 = 0.1396122;
  k174 = 0.4607243;
  k175 = 0.6610982;
  k176 = 0.3336751;
  k177 = 0.07092465;
  k178 = 0.099793;
  k179 = 0.1754399;
  k180 = 0.2688286;
  k181 = 0.4384959;
  k182 = 0.7231057;
  k183 = 0.7328664;
  k184 = 0.3392306;
  k185 = 0.9242412;
  k186 = 0.07720519;
  k187 = 0.08296263;
  k188 = 0.8230874;
  k189 = 0.9453333;
  k190 = 0.09241335;
  k191 = 0.5928175;
  k192 = 0.3734151;
  k193 = 0.5136767;
  k194 = 0.428098;
  k195 = 0.7861036;
  k196 = 0.4826541;
  k197 = 0.538219;
  k198 = 0.8297838;
  k199 = 0.02455429;
  k200 = 0.3827218;
  k201 = 0.02223309;
  k202 = 0.3801478;
  k203 = 0.9101454;
  k204 = 0.549232;
  k205 = 0.2774067;
  k206 = 0.5775383;
  k207 = 0.5457313;
  k208 = 0.933964;
  k209 = 0.5526259;
  k210 = 0.722272;
  k211 = 0.2288792;
  k212 = 0.7892209;
  k213 = 0.416393;
  k214 = 0.5822824;
  k215 = 0.5269239;
  k216 = 0.2560575;
  k217 = 0.143017;
  k218 = 0.3233266;
  k219 = 0.04533791;
  k220 = 0.08933355;
  k221 = 0.2363206;
  k222 = 0.5403554;
  k223 = 0.7381184;
  k224 = 0.7059643;
  k225 = 0.121146;
  k226 = 0.2117602;
  k227 = 0.4483342;
  k228 = 0.0809146;
  k229 = 0.03173325;
  k230 = 0.4981535;
  k231 = 0.2537206;
  k232 = 0.3129116;
  k233 = 0.1500969;
  k234 = 0.2772779;
  k235 = 0.7623678;
  k236 = 0.2894121;
  k237 = 0.8597931;
  k238 = 0.4083405;
  k239 = 0.8012355;
  k240 = 0.6431925;
  k241 = 0.4358336;
  k242 = 0.05422943;
  k243 = 0.06692186;
  k244 = 0.9687813;
  k245 = 0.006940327;
  k246 = 0.09501914;
  k247 = 0.7229794;
  k248 = 0.07771049;
  k249 = 0.3087815;
  k250 = 0.1745124;
  k251 = 0.2727;
  k252 = 0.9588157;
  k253 = 0.6652536;
  k254 = 0.7231233;
  k255 = 0.964911;
  k256 = 0.9187646;
  k257 = 0.4035247;
  k258 = 0.08478307;
  k259 = 0.3851539;
  k260 = 0.758183;
  k261 = 0.4008256;
  k262 = 0.6826991;
  k263 = 0.7030376;
  k264 = 0.7580852;
  k265 = 0.4474711;
  k266 = 0.8641703;
  k267 = 0.3959419;
  k268 = 0.954188;
  k269 = 0.5936463;
  k270 = 0.743077;
  k271 = 0.8061216;
  k272 = 0.5005923;
  k273 = 0.5608022;
  k274 = 0.2048402;
  k275 = 0.1434986;
  k276 = 0.9878187;
  k277 = 0.9471409;
  k278 = 0.08642023;
  k279 = 0.6555606;
  k280 = 0.3728799;
  k281 = 0.7594739;
  k282 = 0.06431481;
  k283 = 0.8426301;
  k284 = 0.01834098;
  k285 = 0.496147;
  k286 = 0.1289558;
  k287 = 0.169974;
  k288 = 0.4958617;
  k289 = 0.3283011;
  k290 = 0.05308194;
  k291 = 0.7932519;
  k292 = 0.8519821;
  k293 = 0.4261787;
  k294 = 0.4907467;
  k295 = 0.953093;
  k296 = 0.1139954;
  k297 = 0.02658068;
  k298 = 0.9022448;
  k299 = 0.7635216;
  k300 = 0.08693454;
  k301 = 0.8665549;
  k302 = 0.1044712;
  k303 = 0.9802703;
  k304 = 0.1251732;
  k305 = 0.6073827;
  k306 = 0.8689766;
  k307 = 0.7716501;
  k308 = 0.8734455;
  k309 = 0.9559216;
  k310 = 0.7146898;
  k311 = 0.3303621;
  k312 = 0.7108685;
  k313 = 0.3825596;
  k314 = 0.8919148;
  k315 = 0.7158877;
  k316 = 0.739628;
  k317 = 0.7405581;
  k318 = 0.5839067;
  k319 = 0.3523531;
  k320 = 0.984519;
  k321 = 0.1525802;
  k322 = 0.8621326;
  k323 = 0.9421248;
  k324 = 0.7791193;
  k325 = 0.2837092;
  k326 = 0.8836973;
  k327 = 0.07876658;
  k328 = 0.7623338;
  k329 = 0.9579766;
  k330 = 0.6096091;
  k331 = 0.06437245;
  k332 = 0.2638807;
  k333 = 0.0362834;
  k334 = 0.6246975;
  k335 = 0.05108998;
  k336 = 0.6044919;
  k337 = 0.37621;
  k338 = 0.9241817;
  k339 = 0.5551321;
  k340 = 0.76887;
  k341 = 0.7084598;
  k342 = 0.8236087;
  k343 = 0.5120842;
  k344 = 0.5107643;
  k345 = 0.06607703;
  k346 = 0.4499931;
  k347 = 0.4893082;
  k348 = 0.02641497;
  k349 = 0.1506998;
  k350 = 0.9239303;
  k351 = 0.1040309;
  k352 = 0.1986751;
  k353 = 0.8407686;
  k354 = 0.7806515;
  k355 = 0.2786154;
  k356 = 0.198979;
  k357 = 0.9726914;
  k358 = 0.1910367;
  k359 = 0.939787;
  k360 = 0.4396598;
  k361 = 0.6628485;
  k362 = 0.04617423;
  k363 = 0.7455189;
  k364 = 0.8333227;
  k365 = 0.3672087;
  k366 = 0.5997133;
  k367 = 0.6909148;
  k368 = 0.4422554;
  k369 = 0.6969548;
  k370 = 0.3625052;
  k371 = 0.4947345;
  k372 = 0.284957;
  k373 = 0.8693958;
  k374 = 0.1498359;
  k375 = 0.4962707;
  k376 = 0.5746031;
  k377 = 0.2260397;
  k378 = 0.04925204;
  k379 = 0.7400161;
  k380 = 0.4038601;
  k381 = 0.8966197;
  k382 = 0.5929101;
  k383 = 0.9080958;
  k384 = 0.5681817;
  k385 = 0.7983063;
  k386 = 0.8668338;
  k387 = 0.6709399;
  k388 = 0.6261172;

  // Reactions:
  r0: Raf1Star|RP|RKIPP => RKIP|RP|RKIPP; k0*Raf1Star|RP|RKIPP;
  r1: ERKPP|Raf1Star|RKIP => RKIPP|Raf1Star|RKIP; k1*ERKPP|Raf1Star|RKIP;
  r2: RP|ERKPP => RP + ERKPP; k2*RP|ERKPP;
  r3: ERKPP|Raf1Star|RKIP|ERKPP => Raf1Star|RKIP|Raf1Star|RKIP|ERKPP; k3*ERKPP|Raf1Star|RKIP|ERKPP;
  r4: MEKPP|ERK|RP => ERK|RP; k4*MEKPP|ERK|RP;
  r5: MEKPP|ERK|RKIP => RP|RKIP; k5*MEKPP|ERK|RKIP;
  r6: RKIPP|ERKPP => RP|RKIPP|ERKPP; k6*RKIPP|ERKPP;
  r7: RKIP|RP => Raf1Star|RKIP|RP; k7*RKIP|RP;
  r8: ERK|RKIP => ERKPP|RKIP; k8*ERK|RKIP;
  r9: ERK|MEKPP => RKIP|MEKPP; k9*ERK|MEKPP;
  r10: Raf1Star|MEKPP|ERK => RP|MEKPP|ERK; k10*Raf1Star|MEKPP|ERK;
  r11: Raf1Star|RKIP|ERKPP|Raf1Star => ERKPP|Raf1Star; k11*Raf1Star|RKIP|ERKPP|Raf1Star;
  r12: ERK|Raf1Star|RKIP|ERKPP => ERKPP|Raf1Star|RKIP|ERKPP; k12*ERK|Raf1Star|RKIP|ERKPP;
  r13: Raf1Star|RKIP|ERKPP|ERK => MEKPP|ERK|ERK; k13*Raf1Star|RKIP|ERKPP|ERK;
  r14: RP|ERKPP => MEKPP|ERK|ERKPP; k14*RP|ERKPP;
  r15: ERKPP|MEKPP => Raf1Star|RKIP|MEKPP; k15*ERKPP|MEKPP;
  r16: ERKPP|RKIPP => Raf1Star|RKIP|RKIPP; k16*ERKPP|RKIPP;
  r17: RP|MEKPP => MEKPP|ERK|MEKPP; k17*RP|MEKPP;
  r18: RP|RKIPP => MEKPP|ERK|RKIPP; k18*RP|RKIPP;
  r19: RKIPP + ERK => RKIPP|ERK; k19*RKIPP*ERK;
  r20: ERKPP|Raf1Star|RKIP|ERKPP => ERKPP + Raf1Star|RKIP|ERKPP; k20*ERKPP|Raf1Star|RKIP|ERKPP;
  r21: ERKPP|RP => Raf1Star|RKIP|ERKPP|RP; k21*ERKPP|RP;
  r22: Raf1Star|RP => Raf1Star|RKIP|RP; k22*Raf1Star|RP;
  r23: Raf1Star|RP|RKIPP => Raf1Star|RKIP|RP|RKIPP; k23*Raf1Star|RP|RKIPP;
  r24: RP|Raf1Star|RKIP => RP|RKIPP|Raf1Star|RKIP; k24*RP|Raf1Star|RKIP;
  r25: RKIP|RP|RKIPP => ERK|RP|RKIPP; k25*RKIP|RP|RKIPP;
  r26: Raf1Star|RKIP|ERK => RP|RKIPP|ERK; k26*Raf1Star|RKIP|ERK;
  r27: ERK|RP => Raf1Star|RKIP|ERKPP|RP; k27*ERK|RP;
  r28: ERKPP|MEKPP => ERKPP + MEKPP; k28*ERKPP|MEKPP;
  r29: Raf1Star|RKIP + ERK => Raf1Star|RKIP|ERK; k29*Raf1Star|RKIP*ERK;
  r30: Raf1Star|RKIP + MEKPP|ERK => Raf1Star|RKIP|MEKPP|ERK; k30*Raf1Star|RKIP*MEKPP|ERK;
  r31: MEKPP|RKIPP => RP|RKIPP|RKIPP; k31*MEKPP|RKIPP;
  r32: RP|RKIPP + MEKPP|ERK => RP|RKIPP|MEKPP|ERK; k32*RP|RKIPP*MEKPP|ERK;
  r33: Raf1Star|RKIP|ERKPP|RKIPP => RKIP|RKIPP; k33*Raf1Star|RKIP|ERKPP|RKIPP;
  r34: RKIP + RKIPP => RKIP|RKIPP; k34*RKIP*RKIPP;
  r35: Raf1Star|RKIP|ERKPP|MEKPP|ERK => RKIP|MEKPP|ERK; k35*Raf1Star|RKIP|ERKPP|MEKPP|ERK;
  r36: RKIP + MEKPP => RKIP|MEKPP; k36*RKIP*MEKPP;
  r37: ERK + Raf1Star|RKIP => ERK|Raf1Star|RKIP; k37*ERK*Raf1Star|RKIP;
  r38: RKIPP + Raf1Star|RKIP|ERKPP => RKIPP|Raf1Star|RKIP|ERKPP; k38*RKIPP*Raf1Star|RKIP|ERKPP;
  r39: MEKPP|RKIPP => Raf1Star|RKIP|RKIPP; k39*MEKPP|RKIPP;
  r40: Raf1Star|RKIP + Raf1Star => Raf1Star|RKIP|Raf1Star; k40*Raf1Star|RKIP*Raf1Star;
  r41: ERKPP|RKIPP => RKIP|RKIPP; k41*ERKPP|RKIPP;
  r42: RKIPP|MEKPP => ERKPP|MEKPP; k42*RKIPP|MEKPP;
  r43: RKIP + ERK => RKIP|ERK; k43*RKIP*ERK;
  r44: ERKPP|RP => RKIPP|RP; k44*ERKPP|RP;
  r45: Raf1Star|RP|RKIPP => ERKPP|RP|RKIPP; k45*Raf1Star|RP|RKIPP;
  r46: RP|RKIPP|RP => Raf1Star|RKIP|RP; k46*RP|RKIPP|RP;
  r47: MEKPP|ERK|RKIP => Raf1Star|RKIP; k47*MEKPP|ERK|RKIP;
  r48: Raf1Star|Raf1Star|RKIP => MEKPP|Raf1Star|RKIP; k48*Raf1Star|Raf1Star|RKIP;
  r49: Raf1Star|RKIP|ERKPP|MEKPP|ERK => RP|RKIPP|MEKPP|ERK; k49*Raf1Star|RKIP|ERKPP|MEKPP|ERK;
  r50: ERK|Raf1Star => MEKPP|Raf1Star; k50*ERK|Raf1Star;
  r51: MEKPP|RKIP => RP|RKIP; k51*MEKPP|RKIP;
  r52: Raf1Star|MEKPP => ERK|MEKPP; k52*Raf1Star|MEKPP;
  r53: Raf1Star|RP => Raf1Star|RKIP|ERKPP|RP; k53*Raf1Star|RP;
  r54: Raf1Star|RKIPP => MEKPP|ERK|RKIPP; k54*Raf1Star|RKIPP;
  r55: MEKPP|ERK|RP|RKIPP => ERKPP|RP|RKIPP; k55*MEKPP|ERK|RP|RKIPP;
  r56: MEKPP|ERK|Raf1Star => RP|RKIPP|Raf1Star; k56*MEKPP|ERK|Raf1Star;
  r57: RP|RP|RKIPP => ERKPP|RP|RKIPP; k57*RP|RP|RKIPP;
  r58: RKIP + Raf1Star|RKIP => RKIP|Raf1Star|RKIP; k58*RKIP*Raf1Star|RKIP;
  r59: RKIP|RKIPP => RP|RKIPP; k59*RKIP|RKIPP;
  r60: RKIP|MEKPP => RP|MEKPP; k60*RKIP|MEKPP;
  r61: MEKPP|RKIPP => Raf1Star|RKIP|ERKPP|RKIPP; k61*MEKPP|RKIPP;
  r62: Raf1Star|RP|RKIPP => MEKPP|ERK|RP|RKIPP; k62*Raf1Star|RP|RKIPP;
  r63: RP|RKIPP|RKIPP => Raf1Star|RKIP|RKIPP; k63*RP|RKIPP|RKIPP;
  r64: RKIPP|MEKPP|ERK => MEKPP|MEKPP|ERK; k64*RKIPP|MEKPP|ERK;
  r65: RKIP|ERK => ERKPP|ERK; k65*RKIP|ERK;
  r66: RP|MEKPP|ERK => ERKPP|MEKPP|ERK; k66*RP|MEKPP|ERK;
  r67: Raf1Star|ERKPP => Raf1Star + ERKPP; k67*Raf1Star|ERKPP;
  r68: ERK + RP => ERK|RP; k68*ERK*RP;
  r69: MEKPP|RP => Raf1Star|RKIP|ERKPP|RP; k69*MEKPP|RP;
  r70: Raf1Star|RKIP|RP => Raf1Star|RKIP|ERKPP|RP; k70*Raf1Star|RKIP|RP;
  r71: Raf1Star|RKIP|ERKPP + RKIPP => Raf1Star|RKIP|ERKPP|RKIPP; k71*Raf1Star|RKIP|ERKPP*RKIPP;
  r72: MEKPP|ERK|RKIP => ERK|RKIP; k72*MEKPP|ERK|RKIP;
  r73: MEKPP|ERK|Raf1Star|RKIP => ERKPP|Raf1Star|RKIP; k73*MEKPP|ERK|Raf1Star|RKIP;
  r74: RKIP|MEKPP|ERK => Raf1Star|MEKPP|ERK; k74*RKIP|MEKPP|ERK;
  r75: MEKPP|RP => ERK|RP; k75*MEKPP|RP;
  r76: RKIPP|Raf1Star|RKIP => RKIPP + Raf1Star|RKIP; k76*RKIPP|Raf1Star|RKIP;
  r77: RP|RKIPP|Raf1Star|RKIP|ERKPP => RP|RKIPP + Raf1Star|RKIP|ERKPP; k77*RP|RKIPP|Raf1Star|RKIP|ERKPP;
  r78: RKIPP|Raf1Star|RKIP => MEKPP|ERK|Raf1Star|RKIP; k78*RKIPP|Raf1Star|RKIP;
  r79: RKIP + Raf1Star => RKIP|Raf1Star; k79*RKIP*Raf1Star;
  r80: RKIP + RP|RKIPP => RKIP|RP|RKIPP; k80*RKIP*RP|RKIPP;
  r81: RP|RKIPP|Raf1Star|RKIP|ERKPP => Raf1Star|RKIP|Raf1Star|RKIP|ERKPP; k81*RP|RKIPP|Raf1Star|RKIP|ERKPP;
  r82: RP|RKIPP|Raf1Star|RKIP => ERKPP|Raf1Star|RKIP; k82*RP|RKIPP|Raf1Star|RKIP;
  r83: MEKPP|ERK|RP => MEKPP|RP; k83*MEKPP|ERK|RP;
  r84: MEKPP + Raf1Star => MEKPP|Raf1Star; k84*MEKPP*Raf1Star;
  r85: RKIPP|MEKPP => Raf1Star|RKIP|MEKPP; k85*RKIPP|MEKPP;
  r86: RP|RKIPP|RKIP => MEKPP|ERK|RKIP; k86*RP|RKIPP|RKIP;
  r87: RP|ERKPP => RKIPP|ERKPP; k87*RP|ERKPP;
  r88: MEKPP|ERK|Raf1Star|RKIP => Raf1Star|RKIP|ERKPP|Raf1Star|RKIP; k88*MEKPP|ERK|Raf1Star|RKIP;
  r89: RP|RKIPP => MEKPP|RKIPP; k89*RP|RKIPP;
  r90: RP|ERK => RP|RKIPP|ERK; k90*RP|ERK;
  r91: RP|ERKPP => MEKPP|ERKPP; k91*RP|ERKPP;
  r92: RP|MEKPP|ERK => RP + MEKPP|ERK; k92*RP|MEKPP|ERK;
  r93: MEKPP|ERK|ERKPP => MEKPP|ERK + ERKPP; k93*MEKPP|ERK|ERKPP;
  r94: RP|RKIPP|Raf1Star|RKIP => Raf1Star|Raf1Star|RKIP; k94*RP|RKIPP|Raf1Star|RKIP;
  r95: RKIP|RP => MEKPP|ERK|RP; k95*RKIP|RP;
  r96: MEKPP|ERK|ERK => RKIPP|ERK; k96*MEKPP|ERK|ERK;
  r97: Raf1Star|RKIP|MEKPP => MEKPP|ERK|MEKPP; k97*Raf1Star|RKIP|MEKPP;
  r98: Raf1Star|RKIP|Raf1Star => MEKPP|ERK|Raf1Star; k98*Raf1Star|RKIP|Raf1Star;
  r99: Raf1Star|RKIP|RP|RKIPP => MEKPP|ERK|RP|RKIPP; k99*Raf1Star|RKIP|RP|RKIPP;
  r100: Raf1Star|RKIP|MEKPP|ERK => Raf1Star|RKIP|ERKPP|MEKPP|ERK; k100*Raf1Star|RKIP|MEKPP|ERK;
  r101: Raf1Star|RKIP|MEKPP|ERK => Raf1Star|MEKPP|ERK; k101*Raf1Star|RKIP|MEKPP|ERK;
  r102: RKIP|RP => Raf1Star|RKIP|ERKPP|RP; k102*RKIP|RP;
  r103: RKIPP|RP|RKIPP => Raf1Star|RKIP|ERKPP|RP|RKIPP; k103*RKIPP|RP|RKIPP;
  r104: RKIPP|Raf1Star => Raf1Star|RKIP|ERKPP|Raf1Star; k104*RKIPP|Raf1Star;
  r105: MEKPP|MEKPP|ERK => RP|RKIPP|MEKPP|ERK; k105*MEKPP|MEKPP|ERK;
  r106: MEKPP|ERK|RP => ERKPP|RP; k106*MEKPP|ERK|RP;
  r107: Raf1Star|Raf1Star|RKIP|ERKPP => ERK|Raf1Star|RKIP|ERKPP; k107*Raf1Star|Raf1Star|RKIP|ERKPP;
  r108: Raf1Star|RKIP|ERKPP|RP => Raf1Star|RKIP|ERKPP + RP; k108*Raf1Star|RKIP|ERKPP|RP;
  r109: Raf1Star|RKIP + RKIP => Raf1Star|RKIP|RKIP; k109*Raf1Star|RKIP*RKIP;
  r110: RKIP + RP => RKIP|RP; k110*RKIP*RP;
  r111: MEKPP|RP => MEKPP + RP; k111*MEKPP|RP;
  r112: Raf1Star + RP => Raf1Star|RP; k112*Raf1Star*RP;
  r113: Raf1Star|RKIP|RKIP => MEKPP|ERK|RKIP; k113*Raf1Star|RKIP|RKIP;
  r114: ERKPP|ERK => MEKPP|ERK; k114*ERKPP|ERK;
  r115: Raf1Star|RKIP|RP => MEKPP|RP; k115*Raf1Star|RKIP|RP;
  r116: MEKPP|ERK|ERKPP => Raf1Star|RKIP|ERKPP|ERKPP; k116*MEKPP|ERK|ERKPP;
  r117: MEKPP|ERK|MEKPP => Raf1Star|RKIP|ERKPP|MEKPP; k117*MEKPP|ERK|MEKPP;
  r118: MEKPP|ERK|MEKPP => ERKPP|MEKPP; k118*MEKPP|ERK|MEKPP;
  r119: Raf1Star|RKIP|ERKPP|RP|RKIPP => MEKPP|ERK|RP|RKIPP; k119*Raf1Star|RKIP|ERKPP|RP|RKIPP;
  r120: MEKPP|ERK|RP|RKIPP => RP|RP|RKIPP; k120*MEKPP|ERK|RP|RKIPP;
  r121: MEKPP|ERK + RP|RKIPP => MEKPP|ERK|RP|RKIPP; k121*MEKPP|ERK*RP|RKIPP;
  r122: MEKPP|ERK + Raf1Star => MEKPP|ERK|Raf1Star; k122*MEKPP|ERK*Raf1Star;
  r123: RKIP|Raf1Star|RKIP|ERKPP => MEKPP|Raf1Star|RKIP|ERKPP; k123*RKIP|Raf1Star|RKIP|ERKPP;
  r124: Raf1Star|ERK => RP|ERK; k124*Raf1Star|ERK;
  r125: RKIPP|ERKPP => ERK|ERKPP; k125*RKIPP|ERKPP;
  r126: ERKPP|Raf1Star|RKIP => Raf1Star|RKIP|ERKPP|Raf1Star|RKIP; k126*ERKPP|Raf1Star|RKIP;
  r127: Raf1Star|ERK => RP|RKIPP|ERK; k127*Raf1Star|ERK;
  r128: Raf1Star|RKIP|Raf1Star => RKIPP|Raf1Star; k128*Raf1Star|RKIP|Raf1Star;
  r129: ERK|Raf1Star|RKIP => MEKPP|Raf1Star|RKIP; k129*ERK|Raf1Star|RKIP;
  r130: ERK|Raf1Star|RKIP => MEKPP|ERK|Raf1Star|RKIP; k130*ERK|Raf1Star|RKIP;
  r131: ERKPP|MEKPP => Raf1Star|RKIP|ERKPP|MEKPP; k131*ERKPP|MEKPP;
  r132: Raf1Star|MEKPP => RKIPP|MEKPP; k132*Raf1Star|MEKPP;
  r133: Raf1Star|ERKPP => RKIPP|ERKPP; k133*Raf1Star|ERKPP;
  r134: RKIP|ERKPP => MEKPP|ERK|ERKPP; k134*RKIP|ERKPP;
  r135: ERKPP|RKIPP => ERK|RKIPP; k135*ERKPP|RKIPP;
  r136: Raf1Star|RP|RKIPP => Raf1Star + RP|RKIPP; k136*Raf1Star|RP|RKIPP;
  r137: RKIPP|MEKPP => RKIP|MEKPP; k137*RKIPP|MEKPP;
  r138: Raf1Star|MEKPP => Raf1Star|RKIP|MEKPP; k138*Raf1Star|MEKPP;
  r139: Raf1Star|ERKPP => Raf1Star|RKIP|ERKPP; k139*Raf1Star|ERKPP;
  r140: RP|RKIPP|Raf1Star|RKIP|ERKPP => MEKPP|ERK|Raf1Star|RKIP|ERKPP; k140*RP|RKIPP|Raf1Star|RKIP|ERKPP;
  r141: MEKPP|ERK|RP => RP|RKIPP|RP; k141*MEKPP|ERK|RP;
  r142: RP|RKIPP|RKIP => Raf1Star|RKIP|ERKPP|RKIP; k142*RP|RKIPP|RKIP;
  r143: RP|RKIPP|RP => Raf1Star|RKIP|ERKPP|RP; k143*RP|RKIPP|RP;
  r144: MEKPP|RKIP => Raf1Star|RKIP; k144*MEKPP|RKIP;
  r145: RP|RKIPP|RKIPP => ERKPP|RKIPP; k145*RP|RKIPP|RKIPP;
  r146: RP|RKIPP|MEKPP => RP|RKIPP + MEKPP; k146*RP|RKIPP|MEKPP;
  r147: RP|RKIPP|ERKPP => RP|RKIPP + ERKPP; k147*RP|RKIPP|ERKPP;
  r148: RKIP + MEKPP|ERK => RKIP|MEKPP|ERK; k148*RKIP*MEKPP|ERK;
  r149: RP|RKIPP => Raf1Star|RKIPP; k149*RP|RKIPP;
  r150: RKIP|ERK => Raf1Star|RKIP|ERK; k150*RKIP|ERK;
  r151: Raf1Star|ERK => RKIP|ERK; k151*Raf1Star|ERK;
  r152: ERK|RP|RKIPP => ERK + RP|RKIPP; k152*ERK|RP|RKIPP;
  r153: Raf1Star|RKIP|ERKPP|MEKPP|ERK => Raf1Star|MEKPP|ERK; k153*Raf1Star|RKIP|ERKPP|MEKPP|ERK;
  r154: Raf1Star|RKIP|ERKPP|ERKPP => Raf1Star|RKIP|ERKPP; k154*Raf1Star|RKIP|ERKPP|ERKPP;
  r155: RP|RKIPP|MEKPP|ERK => RKIPP|MEKPP|ERK; k155*RP|RKIPP|MEKPP|ERK;
  r156: Raf1Star + MEKPP|ERK => Raf1Star|MEKPP|ERK; k156*Raf1Star*MEKPP|ERK;
  r157: Raf1Star|RKIP|ERKPP|Raf1Star => RP|RKIPP|Raf1Star; k157*Raf1Star|RKIP|ERKPP|Raf1Star;
  r158: Raf1Star|RKIP|RP => Raf1Star|RKIP + RP; k158*Raf1Star|RKIP|RP;
  r159: RKIP|Raf1Star|RKIP => ERK|Raf1Star|RKIP; k159*RKIP|Raf1Star|RKIP;
  r160: RKIPP + RP|RKIPP => RKIPP|RP|RKIPP; k160*RKIPP*RP|RKIPP;
  r161: ERK|Raf1Star|RKIP|ERKPP => MEKPP|Raf1Star|RKIP|ERKPP; k161*ERK|Raf1Star|RKIP|ERKPP;
  r162: RP|RKIPP|Raf1Star|RKIP => MEKPP|ERK|Raf1Star|RKIP; k162*RP|RKIPP|Raf1Star|RKIP;
  r163: RP|RP|RKIPP => Raf1Star|RKIP|RP|RKIPP; k163*RP|RP|RKIPP;
  r164: ERK + RKIP => ERK|RKIP; k164*ERK*RKIP;
  r165: RP|RKIPP|Raf1Star|RKIP|ERKPP => Raf1Star|Raf1Star|RKIP|ERKPP; k165*RP|RKIPP|Raf1Star|RKIP|ERKPP;
  r166: RP|RKIPP|Raf1Star|RKIP => RP|RKIPP + Raf1Star|RKIP; k166*RP|RKIPP|Raf1Star|RKIP;
  r167: RP|MEKPP => ERK|MEKPP; k167*RP|MEKPP;
  r168: ERKPP + Raf1Star|RKIP|ERKPP => ERKPP|Raf1Star|RKIP|ERKPP; k168*ERKPP*Raf1Star|RKIP|ERKPP;
  r169: MEKPP|ERK|RKIPP => RP|RKIPP; k169*MEKPP|ERK|RKIPP;
  r170: MEKPP|ERK|ERKPP => RP|ERKPP; k170*MEKPP|ERK|ERKPP;
  r171: RP|RKIPP|MEKPP => MEKPP|ERK|MEKPP; k171*RP|RKIPP|MEKPP;
  r172: RKIPP|Raf1Star|RKIP => RP|Raf1Star|RKIP; k172*RKIPP|Raf1Star|RKIP;
  r173: MEKPP|Raf1Star|RKIP => RP|RKIPP|Raf1Star|RKIP; k173*MEKPP|Raf1Star|RKIP;
  r174: RP|RKIPP|RKIP => Raf1Star|RKIP|RKIP; k174*RP|RKIPP|RKIP;
  r175: MEKPP|ERK|RP => Raf1Star|RKIP|ERKPP|RP; k175*MEKPP|ERK|RP;
  r176: RP|RKIPP|ERKPP => RKIPP|ERKPP; k176*RP|RKIPP|ERKPP;
  r177: ERKPP|Raf1Star => ERK|Raf1Star; k177*ERKPP|Raf1Star;
  r178: RKIP|ERKPP => ERK|ERKPP; k178*RKIP|ERKPP;
  r179: RKIP|Raf1Star|RKIP|ERKPP => RP|Raf1Star|RKIP|ERKPP; k179*RKIP|Raf1Star|RKIP|ERKPP;
  r180: RKIPP|ERKPP => RKIPP + ERKPP; k180*RKIPP|ERKPP;
  r181: RP|RKIPP|MEKPP => Raf1Star|RKIP|ERKPP|MEKPP; k181*RP|RKIPP|MEKPP;
  r182: Raf1Star|Raf1Star|RKIP => ERKPP|Raf1Star|RKIP; k182*Raf1Star|Raf1Star|RKIP;
  r183: Raf1Star|RKIP|Raf1Star|RKIP|ERKPP => ERKPP|Raf1Star|RKIP|ERKPP; k183*Raf1Star|RKIP|Raf1Star|RKIP|ERKPP;
  r184: RKIPP|RP => RP|RKIPP|RP; k184*RKIPP|RP;
  r185: RP|RKIPP|ERK => MEKPP|ERK; k185*RP|RKIPP|ERK;
  r186: Raf1Star|RKIP|RKIP => MEKPP|RKIP; k186*Raf1Star|RKIP|RKIP;
  r187: RKIP|Raf1Star|RKIP => Raf1Star|RKIP|ERKPP|Raf1Star|RKIP; k187*RKIP|Raf1Star|RKIP;
  r188: RKIPP|RP => ERKPP|RP; k188*RKIPP|RP;
  r189: Raf1Star + Raf1Star|RKIP|ERKPP => Raf1Star|Raf1Star|RKIP|ERKPP; k189*Raf1Star*Raf1Star|RKIP|ERKPP;
  r190: RP|RKIPP|Raf1Star|RKIP => ERK|Raf1Star|RKIP; k190*RP|RKIPP|Raf1Star|RKIP;
  r191: RP|MEKPP|ERK => Raf1Star|RKIP|MEKPP|ERK; k191*RP|MEKPP|ERK;
  r192: RKIP|MEKPP|ERK => Raf1Star|RKIP|ERKPP|MEKPP|ERK; k192*RKIP|MEKPP|ERK;
  r193: MEKPP|Raf1Star|RKIP|ERKPP => RP|Raf1Star|RKIP|ERKPP; k193*MEKPP|Raf1Star|RKIP|ERKPP;
  r194: RKIP|ERK => MEKPP|ERK|ERK; k194*RKIP|ERK;
  r195: Raf1Star|ERK => ERKPP|ERK; k195*Raf1Star|ERK;
  r196: ERK|MEKPP => RP|RKIPP|MEKPP; k196*ERK|MEKPP;
  r197: ERK|RKIPP => RP|RKIPP|RKIPP; k197*ERK|RKIPP;
  r198: RKIP|MEKPP => Raf1Star|RKIP|ERKPP|MEKPP; k198*RKIP|MEKPP;
  r199: RP|RP|RKIPP => RKIP|RP|RKIPP; k199*RP|RP|RKIPP;
  r200: MEKPP|ERKPP => ERK|ERKPP; k200*MEKPP|ERKPP;
  r201: RP|Raf1Star => RKIP|Raf1Star; k201*RP|Raf1Star;
  r202: RP|RKIPP|RKIPP => MEKPP|RKIPP; k202*RP|RKIPP|RKIPP;
  r203: RP|RKIPP|ERK => Raf1Star|RKIP|ERK; k203*RP|RKIPP|ERK;
  r204: Raf1Star|RKIP|ERK => MEKPP|ERK; k204*Raf1Star|RKIP|ERK;
  r205: Raf1Star|RKIP|ERK => Raf1Star|ERK; k205*Raf1Star|RKIP|ERK;
  r206: RP|RKIPP|MEKPP|ERK => Raf1Star|RKIP|MEKPP|ERK; k206*RP|RKIPP|MEKPP|ERK;
  r207: Raf1Star|Raf1Star|RKIP|ERKPP => Raf1Star|RKIP|Raf1Star|RKIP|ERKPP; k207*Raf1Star|Raf1Star|RKIP|ERKPP;
  r208: MEKPP|ERK|ERK => RP|RKIPP|ERK; k208*MEKPP|ERK|ERK;
  r209: Raf1Star|RKIP|Raf1Star => ERKPP|Raf1Star; k209*Raf1Star|RKIP|Raf1Star;
  r210: Raf1Star|RKIP|ERKPP|RKIPP => MEKPP|RKIPP; k210*Raf1Star|RKIP|ERKPP|RKIPP;
  r211: RP|RKIP => ERK|RKIP; k211*RP|RKIP;
  r212: Raf1Star|RKIP|RP|RKIPP => ERKPP|RP|RKIPP; k212*Raf1Star|RKIP|RP|RKIPP;
  r213: ERKPP|RKIP => RP|RKIPP|RKIP; k213*ERKPP|RKIP;
  r214: MEKPP|ERK|Raf1Star|RKIP|ERKPP => RP|Raf1Star|RKIP|ERKPP; k214*MEKPP|ERK|Raf1Star|RKIP|ERKPP;
  r215: MEKPP|ERKPP => MEKPP + ERKPP; k215*MEKPP|ERKPP;
  r216: Raf1Star|RKIP|Raf1Star|RKIP|ERKPP => MEKPP|Raf1Star|RKIP|ERKPP; k216*Raf1Star|RKIP|Raf1Star|RKIP|ERKPP;
  r217: ERKPP|RKIP => Raf1Star|RKIP; k217*ERKPP|RKIP;
  r218: RKIP|RKIPP => RP|RKIPP|RKIPP; k218*RKIP|RKIPP;
  r219: Raf1Star|RKIP|ERKPP|Raf1Star => Raf1Star|RKIP|ERKPP + Raf1Star; k219*Raf1Star|RKIP|ERKPP|Raf1Star;
  r220: RKIPP + RP => RKIPP|RP; k220*RKIPP*RP;
  r221: RP|RKIPP|RKIPP => RP|RKIPP; k221*RP|RKIPP|RKIPP;
  r222: ERK|MEKPP => Raf1Star|MEKPP; k222*ERK|MEKPP;
  r223: RP|RKIP => MEKPP|RKIP; k223*RP|RKIP;
  r224: MEKPP|RP|RKIPP => ERK|RP|RKIPP; k224*MEKPP|RP|RKIPP;
  r225: ERK|Raf1Star => RKIPP|Raf1Star; k225*ERK|Raf1Star;
  r226: RKIPP|Raf1Star|RKIP|ERKPP => Raf1Star|RKIP|Raf1Star|RKIP|ERKPP; k226*RKIPP|Raf1Star|RKIP|ERKPP;
  r227: RKIP + Raf1Star|RKIP|ERKPP => RKIP|Raf1Star|RKIP|ERKPP; k227*RKIP*Raf1Star|RKIP|ERKPP;
  r228: RP|Raf1Star => RP|RKIPP|Raf1Star; k228*RP|Raf1Star;
  r229: ERK|RKIPP => Raf1Star|RKIP|RKIPP; k229*ERK|RKIPP;
  r230: ERK|ERKPP => Raf1Star|RKIP|ERKPP; k230*ERK|ERKPP;
  r231: MEKPP|ERK + RKIP => MEKPP|ERK|RKIP; k231*MEKPP|ERK*RKIP;
  r232: Raf1Star|RKIP|ERKPP|MEKPP => Raf1Star|RKIP|ERKPP + MEKPP; k232*Raf1Star|RKIP|ERKPP|MEKPP;
  r233: Raf1Star|RKIP|ERKPP|ERKPP => Raf1Star|RKIP|ERKPP + ERKPP; k233*Raf1Star|RKIP|ERKPP|ERKPP;
  r234: ERK|RKIP => MEKPP|ERK|RKIP; k234*ERK|RKIP;
  r235: Raf1Star|RKIP|RKIPP => RP|RKIPP; k235*Raf1Star|RKIP|RKIPP;
  r236: Raf1Star + RKIPP => Raf1Star|RKIPP; k236*Raf1Star*RKIPP;
  r237: Raf1Star + MEKPP => Raf1Star|MEKPP; k237*Raf1Star*MEKPP;
  r238: Raf1Star + ERKPP => Raf1Star|ERKPP; k238*Raf1Star*ERKPP;
  r239: RP|RKIPP|Raf1Star|RKIP => RKIP|Raf1Star|RKIP; k239*RP|RKIPP|Raf1Star|RKIP;
  r240: RKIPP|MEKPP => Raf1Star|RKIP|ERKPP|MEKPP; k240*RKIPP|MEKPP;
  r241: MEKPP|Raf1Star|RKIP => RKIP|Raf1Star|RKIP; k241*MEKPP|Raf1Star|RKIP;
  r242: RKIP|ERK => RP|RKIPP|ERK; k242*RKIP|ERK;
  r243: ERKPP|Raf1Star|RKIP|ERKPP => RP|Raf1Star|RKIP|ERKPP; k243*ERKPP|Raf1Star|RKIP|ERKPP;
  r244: ERKPP|MEKPP|ERK => RP|MEKPP|ERK; k244*ERKPP|MEKPP|ERK;
  r245: Raf1Star|RKIPP => RKIP|RKIPP; k245*Raf1Star|RKIPP;
  r246: Raf1Star|Raf1Star|RKIP => RP|RKIPP|Raf1Star|RKIP; k246*Raf1Star|Raf1Star|RKIP;
  r247: RKIPP|RP => Raf1Star|RP; k247*RKIPP|RP;
  r248: MEKPP + RKIP => MEKPP|RKIP; k248*MEKPP*RKIP;
  r249: RP|ERK => MEKPP|ERK; k249*RP|ERK;
  r250: MEKPP|ERK|RP => RKIP|RP; k250*MEKPP|ERK|RP;
  r251: RP|RKIPP|RP => MEKPP|RP; k251*RP|RKIPP|RP;
  r252: Raf1Star + RKIP => Raf1Star|RKIP; k252*Raf1Star*RKIP;
  r253: RKIPP|ERK => RP|ERK; k253*RKIPP|ERK;
  r254: RKIPP|ERKPP => MEKPP|ERKPP; k254*RKIPP|ERKPP;
  r255: Raf1Star + ERK => Raf1Star|ERK; k255*Raf1Star*ERK;
  r256: ERK|MEKPP|ERK => RKIPP|MEKPP|ERK; k256*ERK|MEKPP|ERK;
  r257: MEKPP|RP|RKIPP => MEKPP + RP|RKIPP; k257*MEKPP|RP|RKIPP;
  r258: RKIPP|RP|RKIPP => Raf1Star|RKIP|RP|RKIPP; k258*RKIPP|RP|RKIPP;
  r259: MEKPP|ERK|ERK => ERKPP|ERK; k259*MEKPP|ERK|ERK;
  r260: Raf1Star|RKIP|ERKPP|Raf1Star|RKIP => ERKPP|Raf1Star|RKIP; k260*Raf1Star|RKIP|ERKPP|Raf1Star|RKIP;
  r261: Raf1Star|RP|RKIPP => RKIPP|RP|RKIPP; k261*Raf1Star|RP|RKIPP;
  r262: RP|ERK => RKIP|ERK; k262*RP|ERK;
  r263: RKIPP|RP => MEKPP|RP; k263*RKIPP|RP;
  r264: ERK|MEKPP|ERK => MEKPP|MEKPP|ERK; k264*ERK|MEKPP|ERK;
  r265: RP|Raf1Star => MEKPP|ERK|Raf1Star; k265*RP|Raf1Star;
  r266: ERK|RP|RKIPP => Raf1Star|RKIP|ERKPP|RP|RKIPP; k266*ERK|RP|RKIPP;
  r267: MEKPP|ERK|RP|RKIPP => Raf1Star|RKIP|ERKPP|RP|RKIPP; k267*MEKPP|ERK|RP|RKIPP;
  r268: ERK|Raf1Star|RKIP|ERKPP => RP|RKIPP|Raf1Star|RKIP|ERKPP; k268*ERK|Raf1Star|RKIP|ERKPP;
  r269: Raf1Star|RKIP|ERKPP|RKIPP => MEKPP|ERK|RKIPP; k269*Raf1Star|RKIP|ERKPP|RKIPP;
  r270: MEKPP|RP => Raf1Star|RKIP|RP; k270*MEKPP|RP;
  r271: MEKPP|Raf1Star => ERKPP|Raf1Star; k271*MEKPP|Raf1Star;
  r272: RP|RKIPP + RKIP => RP|RKIPP|RKIP; k272*RP|RKIPP*RKIP;
  r273: MEKPP|ERK|ERKPP => ERK|ERKPP; k273*MEKPP|ERK|ERKPP;
  r274: MEKPP|ERK|MEKPP => ERK|MEKPP; k274*MEKPP|ERK|MEKPP;
  r275: ERK|Raf1Star|RKIP|ERKPP => RKIPP|Raf1Star|RKIP|ERKPP; k275*ERK|Raf1Star|RKIP|ERKPP;
  r276: ERK + MEKPP => ERK|MEKPP; k276*ERK*MEKPP;
  r277: ERK + ERKPP => ERK|ERKPP; k277*ERK*ERKPP;
  r278: MEKPP|Raf1Star|RKIP => MEKPP|ERK|Raf1Star|RKIP; k278*MEKPP|Raf1Star|RKIP;
  r279: Raf1Star|RKIP|RP|RKIPP => ERK|RP|RKIPP; k279*Raf1Star|RKIP|RP|RKIPP;
  r280: Raf1Star|RKIP|Raf1Star => ERK|Raf1Star; k280*Raf1Star|RKIP|Raf1Star;
  r281: RKIP|ERKPP => RKIPP|ERKPP; k281*RKIP|ERKPP;
  r282: RP|ERK => ERKPP|ERK; k282*RP|ERK;
  r283: RKIP|RP|RKIPP => ERKPP|RP|RKIPP; k283*RKIP|RP|RKIPP;
  r284: ERK|RKIP => Raf1Star|RKIP|ERKPP|RKIP; k284*ERK|RKIP;
  r285: Raf1Star|RKIP|ERKPP|RKIP => Raf1Star|RKIP; k285*Raf1Star|RKIP|ERKPP|RKIP;
  r286: MEKPP|ERK|Raf1Star|RKIP|ERKPP => RP|RKIPP|Raf1Star|RKIP|ERKPP; k286*MEKPP|ERK|Raf1Star|RKIP|ERKPP;
  r287: Raf1Star|Raf1Star|RKIP => ERK|Raf1Star|RKIP; k287*Raf1Star|Raf1Star|RKIP;
  r288: RP|RP|RKIPP => Raf1Star|RKIP|ERKPP|RP|RKIPP; k288*RP|RP|RKIPP;
  r289: RP|Raf1Star => Raf1Star|RKIP|ERKPP|Raf1Star; k289*RP|Raf1Star;
  r290: MEKPP|Raf1Star => Raf1Star|RKIP|Raf1Star; k290*MEKPP|Raf1Star;
  r291: ERK|MEKPP => Raf1Star|RKIP|ERKPP|MEKPP; k291*ERK|MEKPP;
  r292: MEKPP|ERK|MEKPP => RKIP|MEKPP; k292*MEKPP|ERK|MEKPP;
  r293: Raf1Star|RKIP|ERKPP|RKIPP => ERKPP|RKIPP; k293*Raf1Star|RKIP|ERKPP|RKIPP;
  r294: RKIPP|ERKPP => Raf1Star|ERKPP; k294*RKIPP|ERKPP;
  r295: MEKPP + ERK => MEKPP|ERK; k295*MEKPP*ERK;
  r296: RKIPP|Raf1Star => MEKPP|Raf1Star; k296*RKIPP|Raf1Star;
  r297: Raf1Star|RKIP|RKIPP => Raf1Star|RKIP + RKIPP; k297*Raf1Star|RKIP|RKIPP;
  r298: Raf1Star|RKIP|MEKPP => Raf1Star|RKIP + MEKPP; k298*Raf1Star|RKIP|MEKPP;
  r299: Raf1Star|RP|RKIPP => Raf1Star|RKIP|ERKPP|RP|RKIPP; k299*Raf1Star|RP|RKIPP;
  r300: MEKPP|ERK|Raf1Star|RKIP => RP|RKIPP|Raf1Star|RKIP; k300*MEKPP|ERK|Raf1Star|RKIP;
  r301: Raf1Star|RKIP|ERKPP|Raf1Star|RKIP => ERK|Raf1Star|RKIP; k301*Raf1Star|RKIP|ERKPP|Raf1Star|RKIP;
  r302: MEKPP|ERKPP => RKIP|ERKPP; k302*MEKPP|ERKPP;
  r303: ERKPP|RP => ERKPP + RP; k303*ERKPP|RP;
  r304: ERK|RKIP => Raf1Star|RKIP; k304*ERK|RKIP;
  r305: RP|Raf1Star|RKIP => MEKPP|Raf1Star|RKIP; k305*RP|Raf1Star|RKIP;
  r306: Raf1Star|RP => ERKPP|RP; k306*Raf1Star|RP;
  r307: RP|Raf1Star|RKIP => MEKPP|ERK|Raf1Star|RKIP; k307*RP|Raf1Star|RKIP;
  r308: RP|RP|RKIPP => ERK|RP|RKIPP; k308*RP|RP|RKIPP;
  r309: ERK + Raf1Star => ERK|Raf1Star; k309*ERK*Raf1Star;
  r310: RP|Raf1Star => ERK|Raf1Star; k310*RP|Raf1Star;
  r311: Raf1Star|MEKPP|ERK => Raf1Star|RKIP|ERKPP|MEKPP|ERK; k311*Raf1Star|MEKPP|ERK;
  r312: RP|ERK => Raf1Star|RKIP|ERK; k312*RP|ERK;
  r313: Raf1Star|RKIP|RKIPP => Raf1Star|RKIP|ERKPP|RKIPP; k313*Raf1Star|RKIP|RKIPP;
  r314: RP|MEKPP => ERKPP|MEKPP; k314*RP|MEKPP;
  r315: Raf1Star|Raf1Star|RKIP|ERKPP => RP|RKIPP|Raf1Star|RKIP|ERKPP; k315*Raf1Star|Raf1Star|RKIP|ERKPP;
  r316: Raf1Star|MEKPP => Raf1Star|RKIP|ERKPP|MEKPP; k316*Raf1Star|MEKPP;
  r317: RKIP|Raf1Star|RKIP => ERKPP|Raf1Star|RKIP; k317*RKIP|Raf1Star|RKIP;
  r318: Raf1Star|RKIP|ERKPP|ERKPP => RKIP|ERKPP; k318*Raf1Star|RKIP|ERKPP|ERKPP;
  r319: MEKPP|ERKPP => Raf1Star|RKIP|ERKPP; k319*MEKPP|ERKPP;
  r320: Raf1Star|RKIP + RP|RKIPP => Raf1Star|RKIP|RP|RKIPP; k320*Raf1Star|RKIP*RP|RKIPP;
  r321: MEKPP|ERK|RP => Raf1Star|RP; k321*MEKPP|ERK|RP;
  r322: Raf1Star|RKIP|RP|RKIPP => Raf1Star|RKIP|ERKPP|RP|RKIPP; k322*Raf1Star|RKIP|RP|RKIPP;
  r323: RP|RKIPP|RP => RKIPP|RP; k323*RP|RKIPP|RP;
  r324: RP|MEKPP => RKIPP|MEKPP; k324*RP|MEKPP;
  r325: RKIPP|ERK => Raf1Star|ERK; k325*RKIPP|ERK;
  r326: RP|RKIPP|ERK => RKIPP|ERK; k326*RP|RKIPP|ERK;
  r327: RKIPP|Raf1Star|RKIP => ERK|Raf1Star|RKIP; k327*RKIPP|Raf1Star|RKIP;
  r328: Raf1Star|RKIPP => Raf1Star|RKIP|RKIPP; k328*Raf1Star|RKIPP;
  r329: MEKPP|MEKPP|ERK => MEKPP + MEKPP|ERK; k329*MEKPP|MEKPP|ERK;
  r330: RKIPP|MEKPP|ERK => ERKPP|MEKPP|ERK; k330*RKIPP|MEKPP|ERK;
  r331: Raf1Star|RKIP|ERKPP|ERK => Raf1Star|RKIP|ERK; k331*Raf1Star|RKIP|ERKPP|ERK;
  r332: RP|ERKPP => ERK|ERKPP; k332*RP|ERKPP;
  r333: RP|RKIPP|RP => RKIP|RP; k333*RP|RKIPP|RP;
  r334: MEKPP|ERK|Raf1Star|RKIP|ERKPP => MEKPP|Raf1Star|RKIP|ERKPP; k334*MEKPP|ERK|Raf1Star|RKIP|ERKPP;
  r335: Raf1Star|ERKPP => MEKPP|ERKPP; k335*Raf1Star|ERKPP;
  r336: RKIPP|Raf1Star|RKIP|ERKPP => RKIPP + Raf1Star|RKIP|ERKPP; k336*RKIPP|Raf1Star|RKIP|ERKPP;
  r337: RP|Raf1Star|RKIP => RKIP|Raf1Star|RKIP; k337*RP|Raf1Star|RKIP;
  r338: ERK|RKIPP => Raf1Star|RKIPP; k338*ERK|RKIPP;
  r339: MEKPP|Raf1Star => RKIP|Raf1Star; k339*MEKPP|Raf1Star;
  r340: RKIP|MEKPP|ERK => MEKPP|MEKPP|ERK; k340*RKIP|MEKPP|ERK;
  r341: RP|RKIPP|MEKPP|ERK => ERK|MEKPP|ERK; k341*RP|RKIPP|MEKPP|ERK;
  r342: Raf1Star|RKIP|MEKPP|ERK => RKIPP|MEKPP|ERK; k342*Raf1Star|RKIP|MEKPP|ERK;
  r343: RKIPP|RKIP => RP|RKIPP|RKIP; k343*RKIPP|RKIP;
  r344: RP|Raf1Star => MEKPP|Raf1Star; k344*RP|Raf1Star;
  r345: ERK|Raf1Star => Raf1Star|RKIP|ERKPP|Raf1Star; k345*ERK|Raf1Star;
  r346: MEKPP|ERK|RKIP => Raf1Star|RKIP|RKIP; k346*MEKPP|ERK|RKIP;
  r347: RKIPP|MEKPP|ERK => RKIP|MEKPP|ERK; k347*RKIPP|MEKPP|ERK;
  r348: ERK|RP|RKIPP => MEKPP|ERK|RP|RKIPP; k348*ERK|RP|RKIPP;
  r349: RKIPP|RKIP => Raf1Star|RKIP|ERKPP|RKIP; k349*RKIPP|RKIP;
  r350: RP|RKIPP|ERKPP => Raf1Star|ERKPP; k350*RP|RKIPP|ERKPP;
  r351: RP|RKIPP|Raf1Star|RKIP|ERKPP => RP|Raf1Star|RKIP|ERKPP; k351*RP|RKIPP|Raf1Star|RKIP|ERKPP;
  r352: RKIPP|RKIP => RP|RKIP; k352*RKIPP|RKIP;
  r353: RP|Raf1Star => RKIPP|Raf1Star; k353*RP|Raf1Star;
  r354: RKIP|RP => ERKPP|RP; k354*RKIP|RP;
  r355: RP|RKIPP|MEKPP => ERK|MEKPP; k355*RP|RKIPP|MEKPP;
  r356: RP|RKIPP|ERKPP => ERK|ERKPP; k356*RP|RKIPP|ERKPP;
  r357: ERK|MEKPP|ERK => Raf1Star|MEKPP|ERK; k357*ERK|MEKPP|ERK;
  r358: RP|Raf1Star|RKIP|ERKPP => MEKPP|Raf1Star|RKIP|ERKPP; k358*RP|Raf1Star|RKIP|ERKPP;
  r359: RKIP|ERK => MEKPP|ERK; k359*RKIP|ERK;
  r360: Raf1Star|ERKPP => ERK|ERKPP; k360*Raf1Star|ERKPP;
  r361: RP|RKIPP|MEKPP => RKIP|MEKPP; k361*RP|RKIPP|MEKPP;
  r362: MEKPP + ERKPP => MEKPP|ERKPP; k362*MEKPP*ERKPP;
  r363: Raf1Star|Raf1Star|RKIP|ERKPP => MEKPP|Raf1Star|RKIP|ERKPP; k363*Raf1Star|Raf1Star|RKIP|ERKPP;
  r364: MEKPP + RP|RKIPP => MEKPP|RP|RKIPP; k364*MEKPP*RP|RKIPP;
  r365: ERKPP|Raf1Star|RKIP|ERKPP => RKIP|Raf1Star|RKIP|ERKPP; k365*ERKPP|Raf1Star|RKIP|ERKPP;
  r366: ERK|ERKPP => MEKPP|ERK|ERKPP; k366*ERK|ERKPP;
  r367: Raf1Star|Raf1Star|RKIP|ERKPP => ERKPP|Raf1Star|RKIP|ERKPP; k367*Raf1Star|Raf1Star|RKIP|ERKPP;
  r368: RP|MEKPP => Raf1Star|RKIP|ERKPP|MEKPP; k368*RP|MEKPP;
  r369: RP|ERKPP => Raf1Star|RKIP|ERKPP|ERKPP; k369*RP|ERKPP;
  r370: RKIP|MEKPP|ERK => RKIPP|MEKPP|ERK; k370*RKIP|MEKPP|ERK;
  r371: RP|RKIPP|Raf1Star => ERK|Raf1Star; k371*RP|RKIPP|Raf1Star;
  r372: ERK|Raf1Star => ERKPP|Raf1Star; k372*ERK|Raf1Star;
  r373: RP|Raf1Star => Raf1Star|RKIP|Raf1Star; k373*RP|Raf1Star;
  r374: ERK|RP|RKIPP => RP|RP|RKIPP; k374*ERK|RP|RKIPP;
  r375: Raf1Star|RKIP|ERKPP|ERKPP => Raf1Star|ERKPP; k375*Raf1Star|RKIP|ERKPP|ERKPP;
  r376: RP|RKIPP|ERKPP => MEKPP|ERK|ERKPP; k376*RP|RKIPP|ERKPP;
  r377: RP|RKIP => MEKPP|ERK|RKIP; k377*RP|RKIP;
  r378: RP|RKIPP|Raf1Star|RKIP => RP|Raf1Star|RKIP; k378*RP|RKIPP|Raf1Star|RKIP;
  r379: Raf1Star|RKIP|ERKPP|RP|RKIPP => RKIP|RP|RKIPP; k379*Raf1Star|RKIP|ERKPP|RP|RKIPP;
  r380: RP|RKIPP => RKIP|RKIPP; k380*RP|RKIPP;
  r381: Raf1Star|RKIP|ERKPP|RKIPP => Raf1Star|RKIP|ERKPP + RKIPP; k381*Raf1Star|RKIP|ERKPP|RKIPP;
  r382: MEKPP|RKIP => RP|RKIPP|RKIP; k382*MEKPP|RKIP;
  r383: RKIPP|ERK => RP|RKIPP|ERK; k383*RKIPP|ERK;
  r384: RKIPP|MEKPP => RP|MEKPP; k384*RKIPP|MEKPP;
  r385: ERK|Raf1Star|RKIP => RP|Raf1Star|RKIP; k385*ERK|Raf1Star|RKIP;
  r386: ERK|MEKPP => RKIPP|MEKPP; k386*ERK|MEKPP;
  r387: RP|RKIPP + RKIPP => RP|RKIPP|RKIPP; k387*RP|RKIPP*RKIPP;
  r388: RKIPP|RKIP => MEKPP|ERK|RKIP; k388*RKIPP|RKIP;
end
